# Константа связи
α := 0.7
Φ := 1.2
## Трансфер-матрица
M(k, Φ) := e^(-1i*π*(k + Φ))/(2*k*(-1 + e^(2*1i*π*k))*(1 + e^(2*1i*π*Φ)))*[
    -(2*k*e^(2*1i*π*k) + 2*k*e^(2*1i*π*(k + 2*Φ)) - 1i*α*e^(2*1i*π*(k + Φ)) + (-4*k + 1i*α)*e^(2*1i*π*(2*k + Φ))), -2*k*(-1 + e^(2*1i*π*Φ))*(-1 + e^(2*1i*π*(k + Φ))) - 1i*α*e^(2*1i*π*Φ)*(-1 + e^(2*1i*π*k));
    2*k*e^(4*1i*π*k) + 2*k*e^(2*1i*π*(k + 2*Φ)) + (-2*k + 1i*α)*e^(2*1i*π*(2*k + Φ)) - (2*k + 1i*α)*e^(2*1i*π*(k + Φ)), 2*k*e^(2*1i*π*k) + 2*k*e^(2*1i*π*(k + 2*Φ)) + 1i*α*e^(2*1i*π*(k + Φ)) - (4*k + 1i*α)*e^(2*1i*π*Φ)
]
isContSpectra(k, Φ) := |tr(M(k, Φ))| ≤ 2
## Поведение определителя трансфер-матирцы
f(k, Φ) := |1 - |M(k, Φ)||
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# Видно, что при полуцелых значения магнитного потока Φ определитель трансфер-матрицы устремляется в бесконечность, в то время как при остальных значениях он равен единице
## Численное полученные собственные значения
eig1(k, Φ) := max(eigenvals(M(k, Φ)))
t := 0, 0.001 .. 0.99
eig2(k, Φ) := min(eigenvals(M(k, Φ)))
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t := 0.5, 0.5 + 0.001 .. 0.9
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# Графики для интервала от 0.5 до 0.9 показывают, что собственные значения одновременно практически равны единице.
# Модуль следа трансфер-матрицы. Значения k, для которых он попадает в интервал от 0 до 2 включительно, принадлежат непрерывному спектру.
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## Проверяем правильность выражения для следа
traceM(k, Φ) := e^(1i*π*(-k + Φ))*(4*k + 1i*α + (4*k - 1i*α)*e^(2*1i*π*k))/(2*k*(1 + e^(2*1i*π*Φ)))
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## Проверка упрощенных выражений для элементов трансфер-матрицы в магнитном поле
m11(k, Φ) := M(k, Φ)[:, 0][0]
mm11(k, Φ) := e^(1i*π*k)/cos(π*Φ)*(1 + α/(4*1i*k) + (1 - cos(2*π*Φ))/(e^(1i*2*π*k) - 1))
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m12(k, Φ) := M(k, Φ)[:, 1][0]
mm12(k, Φ) := e^(-1i*π*k)/cos(π*Φ)*(α/(4*1i*k) + sin(π*Φ)*sin(π*(k + Φ))/(1i*sin(π*k)))
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# Упрощенные выражения для элементов трансфер-матрицы совпадают с исходными с хорошй точностью
## Аналитические выражения для собственных значений
λ1(k, Φ) := 1/cos(π*Φ)*(cos(π*k) + α/(4*k)*sin(π*k)) + sqrt((1/cos(π*Φ)*(cos(π*k) + α/(4*k)*sin(π*k)))^2 - 1)
λ2(k, Φ) := 1/cos(π*Φ)*(cos(π*k) + α/(4*k)*sin(π*k)) - sqrt((1/cos(π*Φ)*(cos(π*k) + α/(4*k)*sin(π*k)))^2 - 1)
t := 0, 0.001 .. 0.99
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# Видно, что аналитический рассчет собственных значений совпадает с численным с хорошей точностью.
## Собственные вектора трансфер-матрицы
## Численный расчет собственных векторов
G1(k, Φ) := eigenvec(M(k, Φ), eig1(k, Φ))
G2(k, Φ) := eigenvec(M(k, Φ), eig2(k, Φ))
## Функция для проверки собственных значений и векторов
checkEigens(M, X, λ) := |M*X - λ*X|
# Испытаем нашу функцию, применив ее к сосбтвенным значениям и векторам, посчитанным машиной.
chk1(k, Φ) := checkEigens(M(k, Φ), eigenvecs(M(k, Φ))[:, 0], eigenvals(M(k, Φ))[0])
chk2(k, Φ) := checkEigens(M(k, Φ), eigenvecs(M(k, Φ))[:, 1], eigenvals(M(k, Φ))[1])
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normv(X) := X/|X|
# Выражения для собственных векторов
X1(k, Φ) := normv([mm12(k, Φ); λ1(k, Φ) - mm11(k, Φ)])
X2(k, Φ) := normv([mm12(k, Φ); λ2(k, Φ) - mm11(k, Φ)])
# Преобразованные выражения для собственных векторов
X1(k, Φ) := normv([
    -1i*(cos(π*k) - 1i*sin(π*k))*(α/(4*k) + sin(π*Φ)*sin(π*k + π*Φ)/sin(π*k));
    1i*(α/(4*k)*cos(π*k) - sin(π*k) + sin(π*Φ)^2/sin(π*k)) + cos(π*Φ)*sqrt((1/cos(π*Φ)*(cos(π*k) + α/(4*k)*sin(π*k)))^2 - 1)
])
X2(k, Φ) := normv([
    -1i*(cos(π*k) - 1i*sin(π*k))*(α/(4*k) + sin(π*Φ)*sin(π*k + π*Φ)/sin(π*k));
    1i*(α/(4*k)*cos(π*k) - sin(π*k) + sin(π*Φ)^2/sin(π*k)) - cos(π*Φ)*sqrt((1/cos(π*Φ)*(cos(π*k) + α/(4*k)*sin(π*k)))^2 - 1)
])
# Далее используем пребразованные выражения
k := 0.5
X1(k, Φ) = [-0.512299; -0.858807i]
X2(k, Φ) = [-0.995911; 0.0903355i]
tr(M(k, Φ)) = -0.865248
eigenvecs(M(k, Φ)) = [0.995911, -0.512299i; -0.0903355i, 0.858807]
|M(k, Φ)| = 1
eigenvals(M(k, Φ)) = [-0.432624 - 0.901575i; -0.432624 + 0.901575i]
M(k, Φ)*eigenvecs(M(k, Φ))[:, 0] = [-0.430855 - 0.897888i; -0.0814441 + 0.0390813i]
M(k, Φ)*X1(k, Φ) = [0.221633 - 0.461876i; 0.774279 + 0.37154i]
eigenvals(M(k, Φ))[0]*eigenvecs(M(k, Φ))[:, 0] = [-0.430855 - 0.897888i; -0.0814441 + 0.0390813i]
λ1(k, Φ) = -0.432624 + 0.901575i
(M(k, Φ)*X1(k, Φ))*X1(k, Φ)/|X1(k, Φ)|^2 = -0.432624 + 0.901575i
checkEigens(M(k, Φ), eigenvecs(M(k, Φ))[:, 0], eigenvals(M(k, Φ))[0]) = 2.24739e-16
checkEigens(M(k, Φ), eigenvecs(M(k, Φ))[:, 1], eigenvals(M(k, Φ))[1]) = 1.24127e-16
checkEigens(M(k, Φ), X1(k, Φ), λ1(k, Φ)) = 7.69686e-16
checkEigens(M(k, Φ), X2(k, Φ), λ2(k, Φ)) = 1.38981e-15
# Особыми являются целые значения k и полуцелые значения Φ
t := 0.1, 0.1 + 0.001 .. 0.9
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t := 0.1, 0.1 + 0.001 .. 0.49
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t := 0.1, 0.1 + 0.001 .. 0.49
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t := 0.51, 0.51 + 0.001 .. 1.49
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t := 0.51, 0.51 + 0.001 .. 1.49
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# Собственные числа и лакуны непрерывного спектра
d(k, Φ) := 1/cos(π*Φ)*(cos(π*k) + α/(4*k)*sin(π*k))
isContSpectra(k, Φ) := |1/cos(π*Φ)*(cos(π*k) + α/(4*k)*sin(π*k))| ≤ 1
t := 0.51, 0.51 + 0.001 .. 1.49
t := 0.1, 0.1 + 0.001 .. 3
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Mc(k, Φ, t) := e^(-1i*π*(k + Φ))*(e^(2*π*1i*k) - 1)^-1*(e^(2*1i*k*(t + π)) - e^(2*1i*(k*t + π*Φ)) + e^(2*π*1i*(k + Φ)) - 1)^-1*[
    e^(2*π*1i*k)*(e^(2*π*1i*k) - 1)*(-α*1i/(2*k)*e^(2*1i*π*Φ)*(e^(2*π*1i*k) - 1) + 2*e^(2*π*1i*(k + Φ)) - e^(4*1i*π*Φ) - 1), -α*1i/(2*k)*e^(2*1i*π*Φ)*(e^(2*π*1i*k) - 1)*(e^(2*π*1i*k) - e^(2*1i*k*t)) + (e^(2*π*1i*(k + Φ)) - 1)*(e^(2*1i*(k*t + π*Φ)) - e^(2*1i*π*(k + Φ)) + e^(2*π*1i*k) - 1);
    e^(2*π*1i*k)*(α*1i/(2*k)*e^(2*1i*π*Φ)*(e^(2*π*1i*k) - 1)*(e^(2*π*1i*k) - e^(2*1i*k*t)) + (e^(2*π*1i*k) - e^(2*1i*π*Φ))*(e^(2*1i*k*t)*(e^(2*π*1i*k) + e^(2*1i*π*Φ) - 1) - e^(2*π*1i*(k + Φ)))), α*1i/(2*k)*e^(2*1i*π*Φ)*(e^(2*π*1i*k) - 1)*(e^(2*π*1i*k) - e^(2*1i*k*t)) + e^(2*1i*π*Φ)*((e^(2*π*1i*(k + Φ)) - 1)*(e^(2*π*1i*k) - e^(2*1i*k*t)) - e^(2*1i*k*t)*(e^(2*π*1i*k) - 1)) + e^(2*1i*k*(t + π))*(e^(2*π*1i*k) - 1)
]
Mc(k, Φ, 0) = [-0.432624 - 0.809017i, 1.02041; -0.155161, -0.432624 + 0.809017i]
M(k, Φ) = [-0.432624 - 0.809017i, 1.02041; -0.155161, -0.432624 + 0.809017i]
dif(k, Φ, θ) := norme(Mc(k, Φ, θ) - M(k, Φ))
ar(a, b, delta) := a, a + delta .. b
t := ar(0.1, 0.49, 0.001)
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t := ar(0.51, 0.9, 0.001)
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t := ar(1.1, 1.49, 0.001)
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t := ar(1.51, 1.9, 0.001)
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merge(a, b) := [a[0], b[0]; a[1], b[1]]
det(a, b) := |merge(a, b)|
det([1; 2], [3; 4]) = -2
f1(k, Φ, t) := det(X1(k, Φ), Mc(k, Φ, t)*X1(k, Φ))
f2(k, Φ, t) := det(X2(k, Φ), Mc(k, Φ, t)*X2(k, Φ))
θ := 0.1
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